# OpenSim document version 40000
Model triple_pendulum:
  gravity: 0 -9.81 0
  credits: Ajay Seth
  publications: For testing
  length_units: meters
  force_units: N
  TableReporter__Vec3_ reporter: report_time_interval=0.0078125 [s]
  TableReporter__Vec3_ reporter_0: report_time_interval=0.0078125
  TableReporter__Vec3_ reporter_1: report_time_interval=0.0078125
  TableReporter__Vec3_ reporter_2: report_time_interval=0.0078125
  TableReporter__Vec3_ reporter_3: report_time_interval=0.0078125
  TableReporter__Vec3_ reporter_4: report_time_interval=0.0078125
  TableReporter__Vec3_ reporter_5: report_time_interval=0.0078125
  Ground
  BodySet:
    Body static: mass=1.594 [kg] mass_center=(0.006386 -0.002868 0.15) inertia=(0.122 0.0136 0.0019 0 0 0)
        meshes=box.vtp
      PhysicalOffsetFrame static_imu: socket_parent=.. translation=(-0.0349545 0.0813113 -0.0656205) [meters]
          orientation=(-1.577115 -0.01644351 -1.572339) [radians]
        Brick static_imu_geom_1: half_lengths=(0.02 0.01 0.005)
    Body upper: mass=1.169 mass_center=(0 0.275 0) inertia=(0.02965109 0.000383799 0.02965373 0 0 0)
        meshes=(box.vtp sphere.vtp)
      PhysicalOffsetFrame [values shared by the 8 below unless stated]: socket_parent=..
          orientation=(-1.467166 -1.546767 -3.035222)
      PhysicalOffsetFrame upper_imu: translation=(-0.03124293 0.260991 0.0004635)
        Brick upper_imu_geom_1: half_lengths=(0.02 0.01 0.005)
      PhysicalOffsetFrame upper_imu_0: translation=(-0.03124293 0.260991 0.0004635)
      PhysicalOffsetFrame upper_imu_1: translation=(-0.03124293 0.260991 0.0004635)
      PhysicalOffsetFrame upper_imu_2: translation=(-0.03124293 0.260991 0.0004635)
      PhysicalOffsetFrame upper_imu_3: translation=(-0.03124293 0.260991 0.0004635)
      PhysicalOffsetFrame upper_imu_4: translation=(-0.03124293 0.260991 0.0004635)
      PhysicalOffsetFrame upper_imu_5: translation=(-0.03124293 0.260991 0.0004635)
      PhysicalOffsetFrame upper_imu_6: translation=(-0.03124293 0.260991 0.0004635)
    Body middle: mass=1.105 mass_center=(0 0.26035 0) inertia=(0.02507805 0.000362864 0.02508055 0 0 0)
        meshes=(box.vtp sphere.vtp)
      PhysicalOffsetFrame [values shared by the 8 below unless stated]: socket_parent=..
          orientation=(-0.004017545 -0.01712025 -1.584224)
      PhysicalOffsetFrame middle_imu: translation=(-0.001509 0.263393 0.03475821)
        Brick middle_imu_geom_1: half_lengths=(0.02 0.01 0.005)
      PhysicalOffsetFrame middle_imu_0: translation=(-0.001509 0.263393 0.03475821)
      PhysicalOffsetFrame middle_imu_1: translation=(-0.001509 0.263393 0.03475821)
      PhysicalOffsetFrame middle_imu_2: translation=(-0.001509 0.263393 0.03475821)
      PhysicalOffsetFrame middle_imu_3: translation=(-0.001509 0.263393 0.03475821)
      PhysicalOffsetFrame middle_imu_4: translation=(-0.001509 0.263393 0.03475821)
      PhysicalOffsetFrame middle_imu_5: translation=(-0.001509 0.263393 0.03475821)
      PhysicalOffsetFrame middle_imu_6: translation=(-0.001509 0.263393 0.03475821)
    Body lower: mass=1.519 mass_center=(0 0 0) inertia=(0.001872679 0.008806392 0.01018357 0 0 0) meshes=box.vtp
      PhysicalOffsetFrame [values shared by the 8 below unless stated]: socket_parent=..
          orientation=(0.0003257608 -0.0003626849 -0.000425281)
      PhysicalOffsetFrame lower_imu: translation=(-0.009029 -0.018312 0.03060094)
        Brick lower_imu_geom_1: half_lengths=(0.02 0.01 0.005)
      PhysicalOffsetFrame lower_imu_0: translation=(-0.009029 -0.018312 0.03060094)
      PhysicalOffsetFrame lower_imu_1: translation=(-0.009029 -0.018312 0.03060094)
      PhysicalOffsetFrame lower_imu_2: translation=(-0.009029 -0.018312 0.03060094)
      PhysicalOffsetFrame lower_imu_3: translation=(-0.009029 -0.018312 0.03060094)
      PhysicalOffsetFrame lower_imu_4: translation=(-0.009029 -0.018312 0.03060094)
      PhysicalOffsetFrame lower_imu_5: translation=(-0.009029 -0.018312 0.03060094)
      PhysicalOffsetFrame lower_imu_6: translation=(-0.009029 -0.018312 0.03060094)
  JointSet:
    FreeJoint: socket_parent_frame=ground_offset socket_child_frame=static_offset
      Coordinate _xRotation: default_value=0 range=(-10 10) clamped=false locked=true
      Coordinate _yRotation: default_value=0 range=(-10 10) clamped=false locked=true
      Coordinate _zRotation: default_value=0 range=(-10 10) clamped=false locked=true
      Coordinate _xTranslation: default_value=-0.06 range=(-10 10) clamped=false locked=true
      Coordinate _yTranslation: default_value=2.045 range=(-10 10) clamped=false locked=true
      Coordinate _zTranslation: default_value=2.728 range=(-10 10) clamped=false locked=true
      PhysicalOffsetFrame ground_offset: socket_parent=/ground translation=(0 0 0)
      PhysicalOffsetFrame static_offset: socket_parent=/bodyset/static translation=(0 0 0)
    PinJoint j1: socket_parent_frame=static_offset socket_child_frame=upper_offset
      Coordinate q1: default_value=0 range=(-1.570796 1.570796) clamped=false
      PhysicalOffsetFrame static_offset: socket_parent=/bodyset/static translation=(0 0 0)
      PhysicalOffsetFrame upper_offset: socket_parent=/bodyset/upper translation=(0 0.5207 0)
    PinJoint j2: socket_parent_frame=upper_offset socket_child_frame=middle_offset
      Coordinate q2: default_value=0 range=(-1.570796 1.570796) clamped=false
      PhysicalOffsetFrame upper_offset: socket_parent=/bodyset/upper translation=(0 0 0)
      PhysicalOffsetFrame middle_offset: socket_parent=/bodyset/middle translation=(0 0.5207 0)
    PinJoint j3: socket_parent_frame=middle_offset socket_child_frame=lower_offset
      Coordinate q3: default_value=0.08618436 range=(-1.570796 1.570796) clamped=false
      PhysicalOffsetFrame middle_offset: socket_parent=/bodyset/middle translation=(0 0 0)
      PhysicalOffsetFrame lower_offset: socket_parent=/bodyset/lower translation=(0 0.07 0)
  ControllerSet:
    PrescribedController Brain2: actuator_list=q1
      FunctionSet ControlFunctions: Constant(value=0)
    PrescribedController Brain3: actuator_list=q2
      FunctionSet ControlFunctions: Constant(value=0)
    PrescribedController Brain4: actuator_list=q3
      FunctionSet ControlFunctions: Constant(value=0)
    PrescribedController Brain2_0: actuator_list=q1_0
      FunctionSet ControlFunctions: Constant(value=0)
    PrescribedController Brain3_0: actuator_list=q2_0
      FunctionSet ControlFunctions: Constant(value=0)
    PrescribedController Brain4_0: actuator_list=q3_0
      FunctionSet ControlFunctions: Constant(value=0)
    PrescribedController Brain2_1: actuator_list=q1_1
      FunctionSet ControlFunctions: Constant(value=0)
    PrescribedController Brain3_1: actuator_list=q2_1
      FunctionSet ControlFunctions: Constant(value=0)
    PrescribedController Brain4_1: actuator_list=q3_1
      FunctionSet ControlFunctions: Constant(value=0)
    PrescribedController Brain2_2: actuator_list=q1_2
      FunctionSet ControlFunctions: Constant(value=0)
    PrescribedController Brain3_2: actuator_list=q2_2
      FunctionSet ControlFunctions: Constant(value=0)
    PrescribedController Brain4_2: actuator_list=q3_2
      FunctionSet ControlFunctions: Constant(value=0)
    PrescribedController Brain2_3: actuator_list=q1_3
      FunctionSet ControlFunctions: Constant(value=0)
    PrescribedController Brain3_3: actuator_list=q2_3
      FunctionSet ControlFunctions: Constant(value=0)
    PrescribedController Brain4_3: actuator_list=q3_3
      FunctionSet ControlFunctions: Constant(value=0)
    PrescribedController Brain2_4: actuator_list=q1_4
      FunctionSet ControlFunctions: Constant(value=0)
    PrescribedController Brain3_4: actuator_list=q2_4
      FunctionSet ControlFunctions: Constant(value=0)
    PrescribedController Brain4_4: actuator_list=q3_4
      FunctionSet ControlFunctions: Constant(value=0)
    PrescribedController Brain2_5: actuator_list=q1_5
      FunctionSet ControlFunctions: Constant(value=0)
    PrescribedController Brain3_5: actuator_list=q2_5
      FunctionSet ControlFunctions: Constant(value=0)
    PrescribedController Brain4_5: actuator_list=q3_5
      FunctionSet ControlFunctions: Constant(value=0)
  ForceSet:
    CoordinateActuator q1: coordinate=q1 optimal_force=1
    CoordinateActuator q2: coordinate=q2 optimal_force=1
    CoordinateActuator q3: coordinate=q3 optimal_force=1
    CoordinateActuator q1_0: coordinate=q1 optimal_force=1
    CoordinateActuator q2_0: coordinate=q2 optimal_force=1
    CoordinateActuator q3_0: coordinate=q3 optimal_force=1
    CoordinateActuator q1_1: coordinate=q1 optimal_force=1
    CoordinateActuator q2_1: coordinate=q2 optimal_force=1
    CoordinateActuator q3_1: coordinate=q3 optimal_force=1
    CoordinateActuator q1_2: coordinate=q1 optimal_force=1
    CoordinateActuator q2_2: coordinate=q2 optimal_force=1
    CoordinateActuator q3_2: coordinate=q3 optimal_force=1
    CoordinateActuator q1_3: coordinate=q1 optimal_force=1
    CoordinateActuator q2_3: coordinate=q2 optimal_force=1
    CoordinateActuator q3_3: coordinate=q3 optimal_force=1
    CoordinateActuator q1_4: coordinate=q1 optimal_force=1
    CoordinateActuator q2_4: coordinate=q2 optimal_force=1
    CoordinateActuator q3_4: coordinate=q3 optimal_force=1
    CoordinateActuator q1_5: coordinate=q1 optimal_force=1
    CoordinateActuator q2_5: coordinate=q2 optimal_force=1
    CoordinateActuator q3_5: coordinate=q3 optimal_force=1
  MarkerSet:
    Marker LowerJ1: middle (-7.43392e-5 0.00113139 0.0256544) fixed=true
    Marker LowerJ2: middle (0.000108423 0.00104602 -0.0293545) fixed=true
    Marker MiddleJ1: upper (0.000287748 -0.000262863 0.0281251) fixed=true
    Marker MiddleJ2: upper (0.00130519 0.000906699 -0.0292501) fixed=true
    Marker Lower5: lower (0.108507 0.00782348 0.0270821)
    Marker Lower6: lower (-0.113886 0.0337141 0.024291)
    Marker LowerY: lower (-0.037643 0.0126073 0.0315631)
    Marker LowerO: lower (-0.03899307 -0.05092844 0.02910429)
    Marker LowerX: lower (0.0209195 -0.0490497 0.0336133)
    Marker Lower4: lower (0.113201 0.0304069 -0.028747)
    Marker Middle5: middle (0.0291277 0.465955 -0.0069335)
    Marker Middle4: middle (-0.00951366 0.108455 0.0289253)
    Marker MiddleO: middle (-0.0348941 0.2930887 0.03593052)
    Marker MiddleX: middle (-0.03149055 0.2336971 0.03514439)
    Marker MiddleY: middle (0.0310907 0.292278 0.0355476)
    Marker UpperO: upper (-0.0311992 0.290782 -0.0296665)
    Marker UpperX: upper (-0.0307964 0.2312 -0.0286952)
    Marker UpperY: upper (-0.0311836 0.291647 0.0305938)
    Marker Upper5: upper (-0.0103902 0.100554 0.0290888)
    Marker Upper4: upper (0.03172 0.458632 -0.0114075)
    Marker Static5: static (-0.0330167 0.0477167 0.0281995)
    Marker Static6: static (0.00363195 0.0476806 0.0281845)
    Marker Static4: static (0.0321138 0.0379597 -0.0480805)
    Marker StaticO: static (-0.0663132 0.0814155 -0.0969793)
    Marker StaticX: static (-0.0659207 0.082389 -0.0358034)
    Marker StaticY: static (-0.00359617 0.0827129 -0.0971047)
    Marker UpperJ1: static (0.00477104 -0.00124278 0.0298993)
    Marker UpperJ2: static (0.0053504 -0.00186356 -0.0285513)
    Marker StaticO_0: static (-0.066313 0.081415 -0.096979)
    Marker StaticX_0: static (-0.065921 0.082389 -0.035803)
    Marker StaticY_0: static (-0.003596 0.082713 -0.097105)
    Marker UpperO_0: upper (-0.031199 0.290782 -0.029667)
    Marker UpperX_0: upper (-0.030796 0.2312 -0.028695)
    Marker UpperY_0: upper (-0.031184 0.291647 0.030594)
    Marker UpperJ1_0: upper (0.03172 0.458632 -0.011408)
    Marker MiddleO_0: middle (-0.034894 0.293089 0.035931)
    Marker MiddleX_0: middle (-0.031491 0.233697 0.035144)
    Marker MiddleY_0: middle (0.031091 0.292278 0.035548)
    Marker MiddleJ1_0: middle (0.029128 0.465955 -0.006934)
    Marker LowerO_0: lower (-0.038993 -0.050928 0.029104)
    Marker LowerX_0: lower (0.020919 -0.04905 0.033613)
    Marker LowerY_0: lower (-0.037643 0.012607 0.031563)
    Marker Lower5_0: lower (0.113201 0.030407 -0.028747)
    Marker Lower6_0: lower (-0.113886 0.033714 0.024291)
    Marker StaticO_1: static (-0.066313 0.081415 -0.096979)
    Marker StaticX_1: static (-0.065921 0.082389 -0.035803)
    Marker StaticY_1: static (-0.003596 0.082713 -0.097105)
    Marker UpperO_1: upper (-0.031199 0.290782 -0.029667)
    Marker UpperX_1: upper (-0.030796 0.2312 -0.028695)
    Marker UpperY_1: upper (-0.031184 0.291647 0.030594)
    Marker UpperJ1_1: upper (0.03172 0.458632 -0.011408)
    Marker MiddleO_1: middle (-0.034894 0.293089 0.035931)
    Marker MiddleX_1: middle (-0.031491 0.233697 0.035144)
    Marker MiddleY_1: middle (0.031091 0.292278 0.035548)
    Marker MiddleJ1_1: middle (0.029128 0.465955 -0.006934)
    Marker LowerO_1: lower (-0.038993 -0.050928 0.029104)
    Marker LowerX_1: lower (0.020919 -0.04905 0.033613)
    Marker LowerY_1: lower (-0.037643 0.012607 0.031563)
    Marker Lower5_1: lower (0.113201 0.030407 -0.028747)
    Marker Lower6_1: lower (-0.113886 0.033714 0.024291)
    Marker StaticO_2: static (-0.066313 0.081415 -0.096979)
    Marker StaticX_2: static (-0.065921 0.082389 -0.035803)
    Marker StaticY_2: static (-0.003596 0.082713 -0.097105)
    Marker UpperO_2: upper (-0.031199 0.290782 -0.029667)
    Marker UpperX_2: upper (-0.030796 0.2312 -0.028695)
    Marker UpperY_2: upper (-0.031184 0.291647 0.030594)
    Marker UpperJ1_2: upper (0.03172 0.458632 -0.011408)
    Marker MiddleO_2: middle (-0.034894 0.293089 0.035931)
    Marker MiddleX_2: middle (-0.031491 0.233697 0.035144)
    Marker MiddleY_2: middle (0.031091 0.292278 0.035548)
    Marker MiddleJ1_2: middle (0.029128 0.465955 -0.006934)
    Marker LowerO_2: lower (-0.038993 -0.050928 0.029104)
    Marker LowerX_2: lower (0.020919 -0.04905 0.033613)
    Marker LowerY_2: lower (-0.037643 0.012607 0.031563)
    Marker Lower5_2: lower (0.113201 0.030407 -0.028747)
    Marker Lower6_2: lower (-0.113886 0.033714 0.024291)
    Marker StaticO_3: static (-0.066313 0.081415 -0.096979)
    Marker StaticX_3: static (-0.065921 0.082389 -0.035803)
    Marker StaticY_3: static (-0.003596 0.082713 -0.097105)
    Marker UpperO_3: upper (-0.031199 0.290782 -0.029667)
    Marker UpperX_3: upper (-0.030796 0.2312 -0.028695)
    Marker UpperY_3: upper (-0.031184 0.291647 0.030594)
    Marker UpperJ1_3: upper (0.03172 0.458632 -0.011408)
    Marker MiddleO_3: middle (-0.034894 0.293089 0.035931)
    Marker MiddleX_3: middle (-0.031491 0.233697 0.035144)
    Marker MiddleY_3: middle (0.031091 0.292278 0.035548)
    Marker MiddleJ1_3: middle (0.029128 0.465955 -0.006934)
    Marker LowerO_3: lower (-0.038993 -0.050928 0.029104)
    Marker LowerX_3: lower (0.020919 -0.04905 0.033613)
    Marker LowerY_3: lower (-0.037643 0.012607 0.031563)
    Marker Lower5_3: lower (0.113201 0.030407 -0.028747)
    Marker Lower6_3: lower (-0.113886 0.033714 0.024291)
    Marker StaticO_4: static (-0.066313 0.081415 -0.096979)
    Marker StaticX_4: static (-0.065921 0.082389 -0.035803)
    Marker StaticY_4: static (-0.003596 0.082713 -0.097105)
    Marker UpperO_4: upper (-0.031199 0.290782 -0.029667)
    Marker UpperX_4: upper (-0.030796 0.2312 -0.028695)
    Marker UpperY_4: upper (-0.031184 0.291647 0.030594)
    Marker UpperJ1_4: upper (0.03172 0.458632 -0.011408)
    Marker MiddleO_4: middle (-0.034894 0.293089 0.035931)
    Marker MiddleX_4: middle (-0.031491 0.233697 0.035144)
    Marker MiddleY_4: middle (0.031091 0.292278 0.035548)
    Marker MiddleJ1_4: middle (0.029128 0.465955 -0.006934)
    Marker LowerO_4: lower (-0.038993 -0.050928 0.029104)
    Marker LowerX_4: lower (0.020919 -0.04905 0.033613)
    Marker LowerY_4: lower (-0.037643 0.012607 0.031563)
    Marker Lower5_4: lower (0.113201 0.030407 -0.028747)
    Marker Lower6_4: lower (-0.113886 0.033714 0.024291)
    Marker StaticO_5: static (-0.066313 0.081415 -0.096979)
    Marker StaticX_5: static (-0.065921 0.082389 -0.035803)
    Marker StaticY_5: static (-0.003596 0.082713 -0.097105)
    Marker UpperO_5: upper (-0.031199 0.290782 -0.029667)
    Marker UpperX_5: upper (-0.030796 0.2312 -0.028695)
    Marker UpperY_5: upper (-0.031184 0.291647 0.030594)
    Marker UpperJ1_5: upper (0.03172 0.458632 -0.011408)
    Marker MiddleO_5: middle (-0.034894 0.293089 0.035931)
    Marker MiddleX_5: middle (-0.031491 0.233697 0.035144)
    Marker MiddleY_5: middle (0.031091 0.292278 0.035548)
    Marker MiddleJ1_5: middle (0.029128 0.465955 -0.006934)
    Marker LowerO_5: lower (-0.038993 -0.050928 0.029104)
    Marker LowerX_5: lower (0.020919 -0.04905 0.033613)
    Marker LowerY_5: lower (-0.037643 0.012607 0.031563)
    Marker Lower5_5: lower (0.113201 0.030407 -0.028747)
    Marker Lower6_5: lower (-0.113886 0.033714 0.024291)
    Marker StaticO_6: static (-0.066313 0.081415 -0.096979)
    Marker StaticX_6: static (-0.065921 0.082389 -0.035803)
    Marker StaticY_6: static (-0.003596 0.082713 -0.097105)
    Marker UpperO_6: upper (-0.031199 0.290782 -0.029667)
    Marker UpperX_6: upper (-0.030796 0.2312 -0.028695)
    Marker UpperY_6: upper (-0.031184 0.291647 0.030594)
    Marker UpperJ1_6: upper (0.03172 0.458632 -0.011408)
    Marker MiddleO_6: middle (-0.034894 0.293089 0.035931)
    Marker MiddleX_6: middle (-0.031491 0.233697 0.035144)
    Marker MiddleY_6: middle (0.031091 0.292278 0.035548)
    Marker MiddleJ1_6: middle (0.029128 0.465955 -0.006934)
    Marker LowerO_6: lower (-0.038993 -0.050928 0.029104)
    Marker LowerX_6: lower (0.020919 -0.04905 0.033613)
    Marker LowerY_6: lower (-0.037643 0.012607 0.031563)
    Marker Lower5_6: lower (0.113201 0.030407 -0.028747)
    Marker Lower6_6: lower (-0.113886 0.033714 0.024291)
