# OpenSim document version 40500
Model Kukaiiwa7_Markers_IMUs:
  gravity: 0 -9.81 0
  length_units: meters
  force_units: N
  credits:
    de Kanter, D. License: Creative Commons (CCBY 3.0). You are free to distribute, remix, tweak, and build upon this work, even commercially, as long as you credit us for the original creation. http://creativecommons.org/licenses/by/3.0/
  Marker IMU_Frame1:Marker1: link_1 (-0.07697551 -0.0985359 0.06673743) fixed=true
  Marker IMU_Frame1:Marker2: link_1 (0.07286885 -0.1033805 0.06762727) fixed=true
  Marker IMU_Frame1:Marker3: link_1 (-0.04799655 -0.1264753 0.1879759) fixed=true
  Marker IMU_Frame1:Marker4: link_1 (0.09078674 -0.1395535 0.2338539) fixed=true
  Marker IMU_Frame2:Marker1: link_2 (0.08074788 0.1480359 0.09101381) fixed=true
  Marker IMU_Frame2:Marker2: link_2 (-0.04442775 0.1093263 0.1104307) fixed=true
  Marker IMU_Frame2:Marker3: link_2 (-0.06745368 -0.01087177 0.1484819) fixed=true
  Marker IMU_Frame2:Marker4: link_2 (0.08231558 -0.00442734 0.1373202) fixed=true
  Marker IMU_Frame3:Marker1: link_3 (0.04178963 0.1395927 0.1671703) fixed=true
  Marker IMU_Frame3:Marker2: link_3 (-0.07492991 0.1427925 0.192526) fixed=true
  Marker IMU_Frame3:Marker3: link_3 (-0.07702306 0.09629568 0.05027661) fixed=true
  Marker IMU_Frame3:Marker4: link_3 (0.0742284 0.1034867 0.04869249) fixed=true
  Marker IMU_Frame4:Marker1: link_4 (-0.04810556 0.1160859 0.08880836) fixed=true
  Marker IMU_Frame4:Marker2: link_4 (0.05651165 0.1355852 0.085187) fixed=true
  Marker IMU_Frame4:Marker3: link_4 (-0.07345318 -0.002226218 0.1297564) fixed=true
  Marker IMU_Frame4:Marker4: link_4 (0.07872391 0.006167101 0.1327987) fixed=true
  Marker IMU_Frame5:Marker1: link_5 (0.08523188 0.09544547 0.1070678) fixed=true
  Marker IMU_Frame5:Marker2: link_5 (-0.04686299 0.09804118 0.2299507) fixed=true
  Marker IMU_Frame5:Marker3: link_5 (0.04814868 0.09084367 0.2290291) fixed=true
  Marker IMU_Frame5:Marker4: link_5 (-0.06329033 0.1081539 0.09982845) fixed=true
  Marker IMU_Frame6:Marker1: link_6 (0.03749952 0.03139244 0.1500805) fixed=true
  Marker IMU_Frame6:Marker2: link_6 (0.07515479 -0.08731367 0.1612274) fixed=true
  Marker IMU_Frame6:Marker3: link_6 (-0.04833191 0.03389064 0.149038) fixed=true
  Marker IMU_Frame6:Marker4: link_6 (-0.07510716 -0.08970395 0.1579009) fixed=true
  MarkerSet:
    Marker IMU_Frame1:Marker1: link_1 (-0.07697551 -0.0985359 0.06673743) fixed=true
    Marker IMU_Frame1:Marker2: link_1 (0.07286885 -0.1033805 0.06762727) fixed=true
    Marker IMU_Frame1:Marker3: link_1 (-0.04799655 -0.1264753 0.1879759) fixed=true
    Marker IMU_Frame1:Marker4: link_1 (0.09078674 -0.1395535 0.2338539) fixed=true
    Marker IMU_Frame2:Marker1: link_2 (0.08074788 0.1480359 0.09101381) fixed=true
    Marker IMU_Frame2:Marker2: link_2 (-0.04442775 0.1093263 0.1104307) fixed=true
    Marker IMU_Frame2:Marker3: link_2 (-0.06745368 -0.01087177 0.1484819) fixed=true
    Marker IMU_Frame2:Marker4: link_2 (0.08231558 -0.00442734 0.1373202) fixed=true
    Marker IMU_Frame3:Marker1: link_3 (0.04178963 0.1395927 0.1671703) fixed=true
    Marker IMU_Frame3:Marker2: link_3 (-0.07492991 0.1427925 0.192526) fixed=true
    Marker IMU_Frame3:Marker3: link_3 (-0.07702306 0.09629568 0.05027661) fixed=true
    Marker IMU_Frame3:Marker4: link_3 (0.0742284 0.1034867 0.04869249) fixed=true
    Marker IMU_Frame4:Marker1: link_4 (-0.04810556 0.1160859 0.08880836) fixed=true
    Marker IMU_Frame4:Marker2: link_4 (0.05651165 0.1355852 0.085187) fixed=true
    Marker IMU_Frame4:Marker3: link_4 (-0.07345318 -0.002226218 0.1297564) fixed=true
    Marker IMU_Frame4:Marker4: link_4 (0.07872391 0.006167101 0.1327987) fixed=true
    Marker IMU_Frame5:Marker1: link_5 (0.08523188 0.09544547 0.1070678) fixed=true
    Marker IMU_Frame5:Marker2: link_5 (-0.04686299 0.09804118 0.2299507) fixed=true
    Marker IMU_Frame5:Marker3: link_5 (0.04814868 0.09084367 0.2290291) fixed=true
    Marker IMU_Frame5:Marker4: link_5 (-0.06329033 0.1081539 0.09982845) fixed=true
    Marker IMU_Frame6:Marker1: link_6 (0.03749952 0.03139244 0.1500805) fixed=true
    Marker IMU_Frame6:Marker2: link_6 (0.07515479 -0.08731367 0.1612274) fixed=true
    Marker IMU_Frame6:Marker3: link_6 (-0.04833191 0.03389064 0.149038) fixed=true
    Marker IMU_Frame6:Marker4: link_6 (-0.07510716 -0.08970395 0.1579009) fixed=true
  TableReporter__Vec3_ reporter: report_time_interval=0.01 [s]
      input_inputs=(/bodyset/link_1/FirstIMU|linear_acceleration(IMU1_lin_acc) /bodyset/link_1/FirstIMU|angular_velocity(IMU1_ang_vel) /bodyset/link_2/SecondIMU|linear_acceleration(IMU2_lin_acc) /bodyset/link_2/SecondIMU|angular_velocity(IMU2_ang_vel) /bodyset/link_3/ThirdIMU|linear_acceleration(IMU3_lin_acc) /bodyset/link_3/ThirdIMU|angular_velocity(IMU3_ang_vel) /bodyset/link_4/FourthIMU|linear_acceleration(IMU4_lin_acc) /bodyset/link_4/FourthIMU|angular_velocity(IMU4_ang_vel) /bodyset/link_5/FifthIMU|linear_acceleration(IMU5_lin_acc) /bodyset/link_5/FifthIMU|angular_velocity(IMU5_ang_vel) /bodyset/link_6/SixthIMU|linear_acceleration(IMU6_lin_acc) /bodyset/link_6/SixthIMU|angular_velocity(IMU6_ang_vel))
  Ground
  BodySet:
    Body link_0: mass=5 [kg] mass_center=(-0.1 0 0.07) inertia=(0.05 0.06 0.03 0 0 0)
      PhysicalOffsetFrame link_0_geom_offset: socket_parent=.. translation=(0 0 0) [meters] meshes=link_0.stl
    Body link_1: mass=4.598647 mass_center=(0 -0.02467618 0.1125651) inertia=(0 0 0 0 0 0)
      PhysicalOffsetFrame link_1_geom_offset: socket_parent=.. translation=(0 0 0) meshes=link_1.stl
      PhysicalOffsetFrame IMU1: socket_parent=.. translation=(0.00575053 -0.1174058 0.144046)
          orientation=(1.785319 -0.02645357 1.583158) [radians]
        Brick IMU1_geom_1: half_lengths=(0.02 0.02 0.005)
      PhysicalOffsetFrame FirstIMU: socket_parent=.. translation=(0.00575053 -0.117406 0.144046)
          orientation=(1.78532 -0.0264536 1.58316)
    Body link_2: mass=3.500355 mass_center=(0 0.03959978 0.04926851)
        inertia=(0.05458854 0.03505468 0.08887461 0.04330769 0.003352229 -0.004189977)
      PhysicalOffsetFrame link_2_geom_offset: socket_parent=.. translation=(0 0 0) meshes=(link_2_1.stl link_2_2.stl)
      PhysicalOffsetFrame IMU2: socket_parent=.. translation=(0.01121171 0.06751576 0.119201)
          orientation=(-0.2956101 0.05850585 1.632005)
        Brick IMU2_geom_1: half_lengths=(0.02 0.02 0.005)
      PhysicalOffsetFrame SecondIMU: socket_parent=.. translation=(0.0112117 0.0675158 0.119201)
          orientation=(-0.29561 0.0585059 1.632)
    Body link_3: mass=5.543417 mass_center=(0 0.02092017 0.1246005)
        inertia=(0.02515526 0.02812349 0.006151351 -0.002640641 -0.01032531 -0.006032991)
      PhysicalOffsetFrame link_3_geom_offset: socket_parent=.. translation=(0 0 -0.026) meshes=link_3.stl
      PhysicalOffsetFrame IMU3: socket_parent=.. translation=(-0.01070317 0.1230293 0.1244188)
          orientation=(-1.883059 -0.04553233 -1.576991)
        Brick IMU3_geom_1: half_lengths=(0.02 0.02 0.005)
      PhysicalOffsetFrame ThirdIMU: socket_parent=.. translation=(-0.0107032 0.123029 0.124419)
          orientation=(-1.88306 -0.0455323 -1.57699)
    Body link_4: mass=2.507446 mass_center=(0 0.03949562 0.04921832)
        inertia=(0.0001087508 0.0004170834 0.0004449585 -7.990043e-5 -8.351423e-6 1.349723e-5)
      PhysicalOffsetFrame link_4_geom_offset: socket_parent=.. translation=(0 0 0) meshes=(link_4_1.stl link_4_2.stl)
      PhysicalOffsetFrame IMU4: socket_parent=.. translation=(0.007291721 0.07578767 0.1044401)
          orientation=(-0.343973 -0.03508055 1.61874)
        Brick IMU4_geom_1: half_lengths=(0.02 0.02 0.005)
      PhysicalOffsetFrame FourthIMU: socket_parent=.. translation=(0.00729172 0.0757877 0.10444)
          orientation=(-0.343973 -0.0350805 1.61874)
    Body link_5: mass=1.42708 mass_center=(0 0.04526665 0.1274237)
        inertia=(0.0004832434 0.000185338 0.000455412 5.471375e-5 -7.39997e-5 1.074598e-5)
      PhysicalOffsetFrame link_5_geom_offset: socket_parent=.. translation=(0 0 -0.026) meshes=link_5.stl
      PhysicalOffsetFrame IMU5: socket_parent=.. translation=(-0.002288555 0.09726899 0.1811055)
          orientation=(-1.505834 0.08032586 -1.626893)
        Brick IMU5_geom_1: half_lengths=(0.02 0.02 0.005)
      PhysicalOffsetFrame FifthIMU: socket_parent=.. translation=(-0.00228856 0.097269 0.181105)
          orientation=(-1.50583 0.0803259 -1.62689)
    Body link_6: mass=3.225041 mass_center=(0 0.001819551 0.05724486)
        inertia=(0.002491427 0.002450325 9.958368e-5 -3.852073e-5 -0.000251631 -0.000356412)
      PhysicalOffsetFrame link_6_geom_offset: socket_parent=.. translation=(0 0 0) meshes=(link_6_1.stl link_6_2.stl)
      PhysicalOffsetFrame IMU6: socket_parent=.. translation=(0.006979422 -0.01021552 0.152761)
          orientation=(-0.08129283 -0.02005559 1.590862)
        Brick IMU6_geom_1: half_lengths=(0.02 0.02 0.005)
      PhysicalOffsetFrame SixthIMU: socket_parent=.. translation=(0.00697942 -0.0102155 0.152761)
          orientation=(-0.0812928 -0.0200556 1.59086)
    Body link_7: mass=0.8179828 mass_center=(0 -1.952984e-6 0.02673624) inertia=(0 0 0 0 0 0)
      PhysicalOffsetFrame link_7_geom_offset: socket_parent=.. translation=(0 0 -0.0005) meshes=link_7.stl
  JointSet:
    WeldJoint FixedToGround: socket_parent_frame=ground_offset socket_child_frame=link_0_offset
      PhysicalOffsetFrame ground_offset: socket_parent=/ground translation=(0 0 0) orientation=(-1.570796 0 -1.570796)
      PhysicalOffsetFrame link_0_offset: socket_parent=/bodyset/link_0 translation=(0 0 0)
    PinJoint Revolute0_1: socket_parent_frame=link_0_offset socket_child_frame=link_1_offset
      Coordinate Rotation0_1: default_value=1.71623 range=(-2.96706 2.96706) clamped=false
      PhysicalOffsetFrame link_0_offset: socket_parent=/bodyset/link_0 translation=(0 0 0.15)
      PhysicalOffsetFrame link_1_offset: socket_parent=/bodyset/link_1 translation=(0 0 0)
    PinJoint Revolute1_2: socket_parent_frame=link_1_offset socket_child_frame=link_2_offset
      Coordinate Rotation1_2: default_value=0.05214807 range=(-2.094395 2.094395) clamped=false
      PhysicalOffsetFrame link_1_offset: socket_parent=/bodyset/link_1 translation=(0 0 0.19)
          orientation=(-1.5708 0 -3.14159)
      PhysicalOffsetFrame link_2_offset: socket_parent=/bodyset/link_2 translation=(0 0 0)
    PinJoint Revolute2_3: socket_parent_frame=link_2_offset socket_child_frame=link_3_offset
      Coordinate Rotation2_3: default_value=0.201215 range=(-2.96706 2.96706) clamped=false
      PhysicalOffsetFrame link_2_offset: socket_parent=/bodyset/link_2 translation=(0 0.21 0)
          orientation=(-1.5708 0 3.14159)
      PhysicalOffsetFrame link_3_offset: socket_parent=/bodyset/link_3 translation=(0 0 0)
    PinJoint Revolute3_4: socket_parent_frame=link_3_offset socket_child_frame=link_4_offset
      Coordinate Rotation3_4: default_value=1.779443 range=(-2.094395 2.094395) clamped=false
      PhysicalOffsetFrame link_3_offset: socket_parent=/bodyset/link_3 translation=(0 0 0.19) orientation=(1.5708 0 0)
      PhysicalOffsetFrame link_4_offset: socket_parent=/bodyset/link_4 translation=(0 0 0)
    PinJoint Revolute4_5: socket_parent_frame=link_4_offset socket_child_frame=link_5_offset
      Coordinate Rotation4_5: default_value=-0.4995066 range=(-2.96706 2.96706) clamped=false
      PhysicalOffsetFrame link_4_offset: socket_parent=/bodyset/link_4 translation=(0 0.21 0)
          orientation=(-1.5708 0 3.14159)
      PhysicalOffsetFrame link_5_offset: socket_parent=/bodyset/link_5 translation=(0 0 0)
    PinJoint Revolute5_6: socket_parent_frame=link_5_offset socket_child_frame=link_6_offset
      Coordinate Rotation5_6: default_value=1.777093 range=(-2.094395 2.094395) clamped=false
      PhysicalOffsetFrame link_5_offset: socket_parent=/bodyset/link_5 translation=(0 0.0607 0.19)
          orientation=(1.5708 0 0)
      PhysicalOffsetFrame link_6_offset: socket_parent=/bodyset/link_6 translation=(0 0 0)
    PinJoint Revolute6_7: socket_parent_frame=link_6_offset socket_child_frame=link_7_offset
      Coordinate Rotation6_7: default_value=0 range=(-3.054326 3.054326) clamped=false prescribed=true
          prescribed_function=Constant(value=0)
      PhysicalOffsetFrame link_6_offset: socket_parent=/bodyset/link_6 translation=(0 0.081 0.0607)
          orientation=(-1.5708 0 0)
      PhysicalOffsetFrame link_7_offset: socket_parent=/bodyset/link_7 translation=(0 0 0)
  ControllerSet:
    PrescribedController Brain1: actuator_list=Rotation0_1
      FunctionSet ControlFunctions: Constant(value=0)
    PrescribedController Brain2: actuator_list=Rotation1_2
      FunctionSet ControlFunctions: Constant(value=0)
    PrescribedController Brain3: actuator_list=Rotation2_3
      FunctionSet ControlFunctions: Constant(value=0)
    PrescribedController Brain4: actuator_list=Rotation3_4
      FunctionSet ControlFunctions: Constant(value=0)
    PrescribedController Brain5: actuator_list=Rotation4_5
      FunctionSet ControlFunctions: Constant(value=0)
    PrescribedController Brain6: actuator_list=Rotation5_6
      FunctionSet ControlFunctions: Constant(value=0)
  ForceSet:
    CoordinateActuator Rotation0_1: coordinate=Rotation0_1 optimal_force=1
    CoordinateActuator Rotation1_2: coordinate=Rotation1_2 optimal_force=1
    CoordinateActuator Rotation2_3: coordinate=Rotation2_3 optimal_force=1
    CoordinateActuator Rotation3_4: coordinate=Rotation3_4 optimal_force=1
    CoordinateActuator Rotation4_5: coordinate=Rotation4_5 optimal_force=1
    CoordinateActuator Rotation5_6: coordinate=Rotation5_6 optimal_force=1
  MarkerSet markerset_0:
    Marker IMU_Frame1:Marker1: link_1 (-0.07697551 -0.0985359 0.06673743) fixed=true
    Marker IMU_Frame1:Marker2: link_1 (0.07286885 -0.1033805 0.06762727) fixed=true
    Marker IMU_Frame1:Marker3: link_1 (-0.04799655 -0.1264753 0.1879759) fixed=true
    Marker IMU_Frame1:Marker4: link_1 (0.09078674 -0.1395535 0.2338539) fixed=true
    Marker IMU_Frame2:Marker1: link_2 (0.08074788 0.1480359 0.09101381) fixed=true
    Marker IMU_Frame2:Marker2: link_2 (-0.04442775 0.1093263 0.1104307) fixed=true
    Marker IMU_Frame2:Marker3: link_2 (-0.06745368 -0.01087177 0.1484819) fixed=true
    Marker IMU_Frame2:Marker4: link_2 (0.08231558 -0.00442734 0.1373202) fixed=true
    Marker IMU_Frame3:Marker1: link_3 (0.04178963 0.1395927 0.1671703) fixed=true
    Marker IMU_Frame3:Marker2: link_3 (-0.07492991 0.1427925 0.192526) fixed=true
    Marker IMU_Frame3:Marker3: link_3 (-0.07702306 0.09629568 0.05027661) fixed=true
    Marker IMU_Frame3:Marker4: link_3 (0.0742284 0.1034867 0.04869249) fixed=true
    Marker IMU_Frame4:Marker1: link_4 (-0.04810556 0.1160859 0.08880836) fixed=true
    Marker IMU_Frame4:Marker2: link_4 (0.05651165 0.1355852 0.085187) fixed=true
    Marker IMU_Frame4:Marker3: link_4 (-0.07345318 -0.002226218 0.1297564) fixed=true
    Marker IMU_Frame4:Marker4: link_4 (0.07872391 0.006167101 0.1327987) fixed=true
    Marker IMU_Frame5:Marker1: link_5 (0.08523188 0.09544547 0.1070678) fixed=true
    Marker IMU_Frame5:Marker2: link_5 (-0.04686299 0.09804118 0.2299507) fixed=true
    Marker IMU_Frame5:Marker3: link_5 (0.04814868 0.09084367 0.2290291) fixed=true
    Marker IMU_Frame5:Marker4: link_5 (-0.06329033 0.1081539 0.09982845) fixed=true
    Marker IMU_Frame6:Marker1: link_6 (0.03749952 0.03139244 0.1500805) fixed=true
    Marker IMU_Frame6:Marker2: link_6 (0.07515479 -0.08731367 0.1612274) fixed=true
    Marker IMU_Frame6:Marker3: link_6 (-0.04833191 0.03389064 0.149038) fixed=true
    Marker IMU_Frame6:Marker4: link_6 (-0.07510716 -0.08970395 0.1579009) fixed=true
    Marker IMUF1M1: link_1 (-0.0769755 -0.0985359 0.0667374)
    Marker IMUF1M2: link_1 (0.0728689 -0.103381 0.0676273)
    Marker IMUF1M3: link_1 (-0.0479965 -0.126475 0.187976)
    Marker IMUF1M4: link_1 (0.0907867 -0.139553 0.233854)
    Marker IMUF2M1: link_2 (0.0807479 0.148036 0.0910138)
    Marker IMUF2M2: link_2 (-0.0444278 0.109326 0.110431)
    Marker IMUF2M3: link_2 (-0.0674537 -0.0108718 0.148482)
    Marker IMUF2M4: link_2 (0.0823156 -0.00442734 0.13732)
    Marker IMUF3M1: link_3 (0.0417896 0.139593 0.16717)
    Marker IMUF3M2: link_3 (-0.0749299 0.142793 0.192526)
    Marker IMUF3M3: link_3 (-0.0770231 0.0962957 0.0502766)
    Marker IMUF3M4: link_3 (0.0742284 0.103487 0.0486925)
    Marker IMUF4M1: link_4 (-0.0481056 0.116086 0.0888084)
    Marker IMUF4M2: link_4 (0.0565117 0.135585 0.085187)
    Marker IMUF4M3: link_4 (-0.0734532 -0.00222622 0.129756)
    Marker IMUF4M4: link_4 (0.0787239 0.0061671 0.132799)
    Marker IMUF5M1: link_5 (0.0852319 0.0954455 0.107068)
    Marker IMUF5M2: link_5 (-0.046863 0.0980412 0.229029)
    Marker IMUF5M3: link_5 (0.0481487 0.0908437 0.229029)
    Marker IMUF5M4: link_5 (-0.0632903 0.108154 0.0998284)
    Marker IMUF6M1: link_6 (0.0374995 0.0313924 0.150081)
    Marker IMUF6M2: link_6 (0.0751548 -0.0873137 0.161227)
    Marker IMUF6M3: link_6 (-0.0483319 0.0338906 0.149038)
    Marker IMUF6M4: link_6 (-0.0751072 -0.0897039 0.157901)
